<?xml version="1.0" ?>
<Node name="root" dt="0.04" showBehaviorModels="0" showCollisionModels="0" showMappings="0" showForceFields="1" showBoundingTree="0" showVisualModels="1" gravity="0 -10 0">
<!--    <CollisionPipeline verbose="0" />-->
<!--    <BruteForceDetection name="N2" />-->
<!--    <CollisionResponse response="default" />-->
<!--    <MinProximityIntersection name="Proximity" alarmDistance="0.8" contactDistance="0.5" />-->
<!--    <CollisionGroup />-->

    <Node name="CoarseMesh">
        <MeshLoader name="coarseMesh" filename="applications/plugins/shells/mesh/aneurysm400.obj"/>
        <Vertex2Frame name="coarseMeshVertex2Frame" template="Rigid" vertices="@coarseMesh.vertices" normals="@coarseMesh.normals" invertNormals="false"/>
    </Node>


    <Node name="TargetMesh">
        <MeshLoader name="targetMesh" filename="applications/plugins/shells/mesh/aneurysmHighRes.obj"/>
        <TriangleSetTopologyContainer name="targetTopo"/>
        <MechanicalObject name="targetMesh_MO" template="Vec3d"/>
    </Node>


    <Node name="Shell">
        <EulerImplicitSolver />
		<!--<SparseLDLSolver />-->
        <CGLinearSolver iterations="1000" tolerance="0.05" threshold="1e-20"/>
        <TriangleSetTopologyContainer name="coarseTopo" filename="applications/plugins/shells/mesh/aneurysm400.obj" />
        <MechanicalObject name="coarseMesh_MO" template="Rigid" rest_position="@/CoarseMesh/coarseMeshVertex2Frame.frames" position="@/CoarseMesh/coarseMeshVertex2Frame.frames"/>

        <UniformMass mass="0.3 0.1 [ 0.1 0 0 , 0 0.1 0 , 0 0 0.05 ]" showAxisSizeFactor="0.03"  compute_mapping_inertia="0" />

        <BoxConstraint box="-0.2 -1 -0.2 0.2 -0.8 0.2  0.4 0.3 -0.8 0.8 0.7 -0.7" />
<!--

        <FixedConstraint indices="63 396 62 389 392 64 387 395 45 152 43 204 61 281"/>
        <FixedConstraint indices="54 275 96 394 93 295 16 347"/>
        <FixedConstraint indices="85 234 78 208 79 325 19 332"/>

		-->


        <TriangularBendingFEMForceField name="FEM" bending="true" youngModulus="3000" poissonRatio="0.45" thickness="0.05" refineMesh="0"/>

        <Node name="SubTriangles">
            <TriangleSetTopologyContainer  name="subTrianglesTopo"/>
            <TriangleSubdivisionTopologicalMapping object1="coarseTopo" object2="subTrianglesTopo" subdivisions="3"/>
            <MechanicalObject  name="subPoints" />
            <BendingPlateMechanicalMapping input="@../coarseMesh_MO" output="@subPoints"/>
            <Node>
                <OglModel name="Visual" color="red"/>
                <IdentityMapping input="@../subPoints" output="@Visual"/>
            </Node>
        </Node>

    </Node>
</Node>
