<Node name="root" dt="0.01" gravity="0 -9.81 0" showBehaviorModels="0" showCollisionModels="0" showBoundingCollisionModels="0" showForceFields="0" showWireFrame="0" showInteractionForceFields="1">
	<Object type="MasterContactSolver" maxIt="5000" tolerance="0.00000001"  displayTime="true"  printLog="0"/>
  <CollisionPipeline verbose="0" />
  <BruteForceDetection name="N2" />
  <CollisionResponse response="FrictionContact" />

  <LocalMinDistance name="Proximity" alarmDistance="0.0002" contactDistance="0.00005" bothSides="true" coneFactor="0.3" angleCone="0.001"/>
  <!--<MinProximityIntersection name="Proximity" alarmDistance="0.8" contactDistance="0.5" />  -->


  <!-- !! MOTION !! -->
  <Node name="articulatedObject1">
    <Object type="MechanicalObject" name="ArticulatedObject" template="Vec1d"/>
    <Node name="6D_DOFs1">
      <Object type="MechanicalObject" name="6D_Dof" template="Rigid"/>
      <Object type="UniformMass" mass="0.00128 0.000001 0.0000001 0 0 0 0.0000001 0 0 0 0.0000001" showAxisSizeFactor="5"/>
      <Object type="ArticulatedSystemMapping" object1="ArticulatedObject" object2="6D_Dof"/>
    </Node>
    <Object type="ArticulatedHierarchyContainer" filename="ImplantMotion.bvh"/>
		<Object type="ArticulatedHierarchyBVHController" />
	</Node>


  <Node name="Rest_position">
    <MeshLoader name="rest_shape" filename="../mesh/lens_implant_refinedHaptics.obj"/>
    <Mesh/>
    <Vertex2Frame name="RestVertex2Frame" template="Rigid" vertices="@rest_shape.vertices" normals="@rest_shape.normals" />
    <!--        <MechanicalObject name="rest_triangles" template="Rigid" position="@RestVertex2Frame.frames"/>-->
    <!--        <OglModel name="Visual" color="green"/>-->
  </Node>

  <Node name="Implant">
    <EulerImplicitSolver rayleighMass="1.0" rayleighStiffness="1.0"/>
    <SparseLDLSolver name="SparseLDL Solver" printLog="false" />
    <TriangleSetTopologyContainer name="baseTriangles" filename="../mesh/lens_implant_refinedHaptics.obj"/>
    <!--        <MechanicalObject name="tri" template="Rigid" debugViewIndices="false" debugViewIndicesScale="0.00005" rest_position="@../Rest_position/RestVertex2Frame.frames" position="@../Rest_position/RestVertex2Frame.frames"/>-->
    <MechanicalObject name="tri" template="Rigid" debugViewIndices="false" debugViewIndicesScale="0.0003" rest_position="@../Rest_position/RestVertex2Frame.frames" position="
        0.000623794 -0.000948874 -0.00116217 0.0540121 0.635291 0.729463 -0.247733 0.000640613 -0.000898312 -0.00139823 0.0335413 -0.635482 -0.758047 0.142837 0.000390566 -0.000977759 -0.00130849 0.0395558 -0.63531 -0.758954 0.137134 -7.9767e-05 0.00101832 -0.00114446 0.060604 0.595341 -0.740398 0.306115 0.000498626 -0.000893962 -0.00159646 -0.0210687 0.636151 0.755369 -0.155836 -0.000101742 0.000941507 -0.00137229 0.000156741 -0.596128 0.771475 -0.222393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"/>

    <!--UniformMass mass="0.1 0.1 [ 0.1 0 0 ,  0 0.1 0 ,  0 0 0.05 ]" showAxisSizeFactor="0.0003" totalmass="0.0001" />-->

    <!-- State writing -->
    <!--        <WriteState filename="FoldedSquare.state" writeX="1" period="1"/>-->

    <!-- Fix vertices
    <FixedConstraint indices="468" drawSize="0"/>-->

    <!-- Attach to the bvh position-->
     <RestShapeSpringsForceField points="468" stiffness="300000000" angularStiffness="10000000" external_rest_shape="../articulatedObject1/6D_DOFs1/6D_Dof" external_points="1"/>

    <!--<AttachConstraint object1="../articulatedObject1/6D_DOFs1/6D_Dof" object2="tri" indices1="1" indices2="468"/>-->


    <TriangularBendingFEMForceField name="FEM" bending="true" youngModulus="1.092e6" poissonRatio="0.42" thickness="0.15"/>
    <LinearSolverConstraintCorrection  />
    <Node>
      <MechanicalObject name="basePointsVec3" template="Vec3d"/>
      <IdentityMapping/>
      <Triangle selfCollision="1"/>
      <Line selfCollision="0"/>
      <Point selfCollision="1"/>
      <!--            <StiffSpringForceField name="Springs" stiffness="5e7" spring="4 248 5e7 1 0.0001   129 270 5e7 1 0.0001   10 221 5e7 1 0.0001   12 104 5e7 1 0.0001   118 251 5e7 1 0.0001   106 116 5e7 1 0.0001   3 269 5e7 1 0.0001   130 240 5e7 1 0.0001    70 173 5e7 1 0.0001   71 243 5e7 1 0.0001   64 244 5e7 1 0.0001   65 241 5e7 1 0.0001"/>-->

      <Node name="VisualBasePoints">
        <OglModel name="Visual" color="green"/>
        <IdentityMapping object1="basePointsVec3" object2="Visual"/>
      </Node>
    </Node>

    <!--        <Node name="SubTriangles">-->
    <!--            <TriangleSetTopologyContainer  name="subTriangles"/>-->
    <!--            <TriangleSubdivisionTopologicalMapping object1="baseTriangles" object2="subTriangles" subdivisions="1"/>-->
    <!--            <MechanicalObject  name="subPoints" debugViewIndices="false" debugViewIndicesScale="0.0003"/>-->
    <!--            <BendingPlateMechanicalMapping/>-->
    <!--            <Triangle />-->
    <!--            <Node>-->
    <!--                <OglModel name="Visual" color="red"/>-->
    <!--                <IdentityMapping object1="subPoints" object2="Visual"/>-->
    <!--            </Node>-->
    <!--        </Node>-->

  </Node>


  <Node name="Tube">
    <!--<EulerImplicitSolver rayleighMass="0.5" rayleighStiffness="1.5"/>
    <CGLinearSolver iterations="5" tolerance="1e-15" threshold="1e-15"/>
    <MechanicalObject name="rigid" template="Rigid"  position="0 0 0 0 0 0 1" free_velocity="-0.0000 0 0 0 0" velocity="-0.000 0 0 0 0 0"/>
    <UniformMass mass="0.1 0.1 [ 0.1 0 0 ,  0 0.1 0 ,  0 0 0.05 ]" showAxisSizeFactor="0.001" totalmass="0.0001" />
    <UncoupledConstraintCorrection   compliance="0 0 0 0 0 0 0"/>-->
    <Node name="Collision">
      <TriangleSetTopologyContainer name="tubeTriangles" filename="../mesh/tube.obj" />
      <MechanicalObject name="tube" template="Vec3d"  dz="-0.00295" scale="0.45"/>
      <Triangle />
      <Line />
      <Point />
     <!-- <RigidMapping />-->
      <Node name="Visual">
        <OglModel name="Visual"  color="0 0 1 0.3"  dz="-0.00295" />
        <IdentityMapping object1="tube" object2="Visual" />
      </Node>
    </Node>

  </Node>

</Node>
