<?xml version="1.0"?>
<Node name="Root">
    <VisualStyle displayFlags="showWireframe showBehavior" />

    <CollisionPipeline verbose="0" />
    <BruteForceDetection name="N2" />
    <CollisionResponse response="default" />
    <MinProximityIntersection name="Proximity" alarmDistance="0.8" contactDistance="0.5" />
    <CollisionGroup />

    <Node>
        <MeshObjLoader name="mesh" filename="../mesh/plane32-noise.obj"/>
        <TriangleSetTopologyContainer name="points" src="@mesh" />

        <TriangleSetTopologyModifier />
        <TriangleSetGeometryAlgorithms template="Vec3d" />

        <Test2DAdapter template="Vec3d" name="adapter" sigma="1e-5" />
        <MechanicalObject template="Vec3d" name="MO" rest_position="@mesh.position" />

        <Triangle />

        <Node name="Render">
            <OglModel name="Visual" color="green"/>
            <IdentityMapping input="@.." output="@Visual"/>
        </Node>
    </Node>

</Node>
