<?xml version="1.0"?>
<Node name="Root Node" dt="0.01" gravity="0 0 0">

    <VisualStyle displayFlags="showVisual showBehavior" />

    <!--
	<CollisionPipeline name="Collision Pipeline" verbose="0"/>
	<BruteForceDetection name="Brute Force Detection"/>
	<CollisionResponse name="Collision Response" response="default"/>
	<MinProximityIntersection name="Min Proximity Intersection" alarmDistance="0.8" contactDistance="0.5"/>
	<CollisionGroup name="Collision Group"/>
    -->

    <Node name="MeshOriginal">
        <!--<VisualStyle displayFlags="showVisual showWireframe" />-->
        <MeshObjLoader name="loader" filename="arch_cut.obj"/>
        <Vertex2Frame name="frames" template="Rigid"
            position="@loader.position" normals="@loader.normals"
            invertNormals="false"/>
        <TriangleSetTopologyContainer name="originalTopo" src="@loader"/>
        <MechanicalObject name="original_MO" template="Vec3d" position="@originalTopo.position" />
        <!--<MechanicalObject name="original_MO" template="Rigid" position="@frames.frames" />-->

        <TriangleSetGeometryAlgorithms name="GeomAlgo" template="Vec3d" drawEdges="1" drawColorEdges="1 0.2 0.2" />

        <!--
		<OglModel name="Visual2" color="blue"/>
		<IdentityMapping input="@." output="@Visual2"/>
        -->

    </Node>

    <Node name="Mesh">
        <MeshObjLoader name="loader" filename="arch_cut_combined.obj"/>
        <Vertex2Frame name="frames" template="Rigid"
            position="@loader.position" normals="@loader.normals"
            invertNormals="false"/>
        <TriangleSetTopologyContainer name="joinedTopo" src="@loader"/>
        <MechanicalObject name="joined_MO" template="Vec3d" position="@joinedTopo.position" />
        <!--<MechanicalObject name="joined_MO" template="Rigid" position="@frames.frames" />-->
        <TriangleSetGeometryAlgorithms name="GeomAlgo" template="Vec3d" drawEdges="0" drawColorEdges="0.2 1 0.2" />
    </Node>


	<Node name="Cylinder">

        <EulerImplicit />

        <CGLinearSolver name="CG Linear Solver" iterations="20" tolerance="1.0e-9" threshold="1.0e-9"/>
        <!--
        <SparseLDLSolver />
        -->

        <TriangleSetTopologyContainer name="coarseTopo" src="@/Mesh/loader"/>
        <MechanicalObject name="MO" template="Rigid" position="@/Mesh/frames.frames" />

        <BoxROI name="fixed1" box="-1 -2.26 -6.1   1.7 -1.7 -4" drawBoxes="true" />
        <BoxROI name="fixed2" box="-1 -2.26 4.5   1.7 -1.7 6.6" drawBoxes="true" />
        <FixedConstraint indices="@fixed1.indices" />
        <FixedConstraint indices="@fixed2.indices" />

        <UniformMass showAxisSizeFactor="0.1" totalMass="1" />

        <FixedRotationConstraint FixedZRotation="true" />

        <TriangularBendingFEMForceField name="FEM" bending="true"
            youngModulus="5000" poissonRatio="0.33" thickness="0.1"
            joinEdges="true" convergenceRatio="0.01"
            edge1=          " 95 211 212  26 184 122 127 135 197 219 207"
            edge2=          "152  55  81 200 217 178 155 204  58 183 164"
            edgeCombined=   "144 200 201 189 206 169 147 193 186 208 196"
            originalNodes="@/MeshOriginal/frames.frames"
            originalTriangles="@/MeshOriginal/originalTopo.triangles"
            />
        <!--
            nodeMap="0 1 2 3 4 5 6 7 8 9 10 11 12 13 14 15 16 17 18 19 20 21 22 23 24 25 27 28 29 30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"
            -->

		<OglModel name="Visual1" color="green"/>
		<IdentityMapping input="@." output="@Visual1"/>

	</Node>

</Node>
