<Node name="root" dt="0.01" gravity="0 0 0" showBehaviorModels="0" showCollisionModels="0" showMappings="0" showForceFields="1" showBoundingTree="0">
        <MasterContactSolver/>
        <LCPConstraintSolver tolerance="1e-6" initial_guess="false" build_lcp="true" printLog="false" mu="0.1"/>
        <CollisionPipeline verbose="0" />
        <BruteForceDetection name="N2" />
        <CollisionResponse response="FrictionContact" />
        <LocalMinDistance name="Proximity" alarmDistance="0.0002" contactDistance="0.00005" coneFactor="0.3" angleCone="0.001"/>
        <CollisionGroup />
	<LightManager />
	<SpotLight name="light1" color="1 1 1" position="0 0 -0.1" direction="0 0 1" />


        <!-- Motion control of the implant -->
        <Node name="ImplantMotion">
            <MechanicalObject name="ArticulatedObject" template="Vec1d"/>
            <Node name="6D_DOFs1">
                <MechanicalObject name="6D_Dof" template="Rigid"/>
                <UniformMass mass="0.00128 0.000001 [0.0000001 0 0 0 0.0000001 0 0 0 0.0000001]" showAxisSizeFactor="5"/>
                <ArticulatedSystemMapping object1="ArticulatedObject" object2="6D_Dof"/>
            </Node>
            <ArticulatedHierarchyContainer filename="data/ImplantMotion.bvh"/>
            <ArticulatedHierarchyBVHController />
        </Node>


        <Node name="Rest_position">
            <MeshObjLoader name="rest_shape" filename="data/mesh/implant_restPosition.obj"/>
            <Mesh/>
            <Vertex2Frame name="RestVertex2Frame" template="Rigid" vertices="@rest_shape.position" normals="@rest_shape.normals" />
        </Node>


    <Node name="Implant">
        <EulerImplicitSolver rayleighMass="1.0" rayleighStiffness="1.0"/>
<!--        <CGLinearSolver iterations="100" tolerance="1e-15" threshold="1e-15"/>-->
        <SparseLDLSolver name="SparseLDL Solver" printLog="false" />
        <TriangleSetTopologyContainer name="baseTriangles" filename="data/mesh/implant_restPosition.obj"/>
        <MechanicalObject name="implant" template="Rigid" debugViewIndices="false" debugViewIndicesScale="0.0003" rest_position="@../Rest_position/RestVertex2Frame.frames" position="
        0.000512879 0.000661019 -0.000554555 0.118404 0.44223 0.462375 -0.759357 0.000517124 0.000837666 -0.000729412 0.297966 -0.380627 -0.852897 0.197248 0.00031659 0.00062241 -0.000753894 0.314308 -0.371918 -0.857829 0.164368 -2.9254e-06 -0.000413218 -0.000161942 -0.155645 0.417155 -0.740267 0.503747 0.000392939 0.000891249 -0.000934388 -0.212511 0.422343 0.807316 -0.353138 -2.75571e-05 -0.000613389 -0.000311622 -0.0638024 -0.473256 0.507626 -0.717129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"
        dx="-0.0021" dy="0.0013" dz="0.0004" rx="5" ry="-10" rz="0"/>
<!--        <UniformMass mass="0.1 0.1 [ 0.1 0 0 ,  0 0.1 0 ,  0 0 0.05 ]" showAxisSizeFactor="0.0003" totalmass="0.0001" />-->


        <RestShapeSpringsForceField points="468" stiffness="1e10" angularStiffness="1e8" external_rest_shape="../ImplantMotion/6D_DOFs1/6D_Dof" external_points="1"/>
<!--        <FixedConstraint indices="468"/>-->


        <TriangularBendingFEMForceField name="FEM" bending="true" youngModulus="1.092e6" poissonRatio="0.42" thickness="0.15"/>
        <LinearSolverConstraintCorrection  />
        <Node>
            <MechanicalObject name="basePointsVec3" template="Vec3d"/>
            <IdentityMapping/>
            <Triangle name="Triangles"  selfCollision="1" bothSide="1" />
            <Line name="Lines"  selfCollision="1"  bothSide="1"  group="2"/>
            <Point name="Points" selfCollision="1"  bothSide="1" group="2"/>
            <Node name="VisualBasePoints">
                <OglShader vertFilename="shaders/generalRenderingShader.vert" fragFilename="shaders/generalRenderingShader.frag" />
		<OglShaderDefineMacro id="BORDER_OPACIFYING" />
		<OglShaderDefineMacro id="PHONG" />
		<OglShaderDefineMacro id="DOUBLE_SIDED" />
		<OglFloatVariable id="coeffAngle" value="0.1"/>
		<OglFloatVariable id="border_alpha" value="1.0"/>
		<OglFloatVariable id="border_gamma" value="4.0"/>
                <OglModel premultipliedAlpha="true" name="ImplantVisual" material="texture Ambient 1 0.5 0.5 0.0 1.0 Diffuse 1 0.2 0.2 0.0 0.2 Specular 1 0.8 0.8 0.8 1.0 Emissive 0 0.25 0.05 0.05 0.0 Shininess 1 25"/>
                <IdentityMapping object1="basePointsVec3" object2="ImplantVisual" />
            </Node>
        </Node>

<!--                  <Node name="SubTriangles">-->
<!--                      <TriangleSetTopologyContainer  name="subTriangles"/>-->
<!--                      <TriangleSubdivisionTopologicalMapping object1="baseTriangles" object2="subTriangles" subdivisions="0"/>-->
<!--                      <MechanicalObject  name="subPoints" debugViewIndices="false" debugViewIndicesScale="0.0003" printLog="true"/>-->
<!--                      <BendingPlateMechanicalMapping/>-->
<!--<!--                      <Triangle />-->-->
<!--<!--                      <Node>-->-->
<!--<!--                          <OglModel name="Visual" color="red"/>-->-->
<!--<!--                          <IdentityMapping object1="subPoints" object2="Visual"/>-->-->
<!--<!--                      </Node>-->-->
<!--                  </Node>-->

<!--            <Node name="SubTriangles">-->
<!--                <MechanicalObject name="basePointsVec3" template="Vec3d"/>-->
<!--                <IdentityMapping/>-->
<!--                <Node>-->
<!--                    <OglModel name="Visual" color="red"/>-->
<!--                    <IdentityMapping object1="basePointsVec3" object2="Visual"/>-->
<!--                </Node>-->
<!--            </Node>-->

        </Node>


        <Node name="InjectorCollisionModel">
            <Node name="Collision">
                <TriangleSetTopologyContainer name="injector_CM_topo" filename="data/mesh/injector_CM.obj" />
                <MechanicalObject name="injector_CM" template="Vec3d"/>
                <Triangle group="3" moving="0" simulated="0"/>
                <Line group="3" moving="0" simulated="0"/>
                <Point group="3" moving="0" simulated="0"/>
                <Node name="Visual">
                    <OglModel name="injector_CM_visual"  color="0 0 1 0.3" />
                    <IdentityMapping object1="injector_CM" object2="injector_CM_visual" />
                </Node>
            </Node>
        </Node>


<!--	<Node name ="group">-->
<!---->
<!--		<Node name="articulatedObject2">-->
<!--			-->
<!--			<Node name="6D_DOFs1">-->
<!---->
<!--				<Node name="Iris_">-->
<!--					<OglModel name="Iris"  fileMesh="data/mesh/iris.obj" texturename="data/textures/iris.bmp" />-->
<!--				</Node>-->
<!--				-->
<!--				<Node name="Sclera_">-->
<!--					<OglShader vertFilename="shaders/generalRenderingShader.vert" fragFilename="shaders/generalRenderingShader.frag" />-->
<!--					<OglShaderDefineMacro id="TEXTURE_UNIT_0" />-->
<!--					<OglShaderDefineMacro id="PHONG" />-->
<!--					<OglFloatVariable id="altitude" value="0.1"/>-->
<!--					<OglFloatVariable id="border_gamma" value="4.0"/>-->
<!--					<OglFloatVariable id="border_alpha" value="1.0"/>-->
<!--					<OglIntVariable id="axis" value="2"/>-->
<!--					<OglFloatVector4Variable id="colors" value="1.0 0.0 0.0 1.0 0.0 1.0 0.0 1.0 0.0 0.0 1.0 1.0"/>-->
<!--					<OglTexture textureFilename="textures/lights4-small-noise.bmp" textureUnit="1" id="planeTexture" />-->
<!--					-->
<!--					<OglModel name="Sclera" fileMesh="data/mesh/sclera.obj" texturename="data/textures/sclera.bmp" castshadow="0" premultipliedAlpha="true" />-->
<!--				</Node>-->
<!--	-->
<!--				<Node name="Choroid_">-->
<!--					<OglModel name="Choroid" fileMesh="data/mesh/choroid.obj" normals="0" texturename="data/textures/choroid.bmp" castshadow="0"/>-->
<!--				</Node> -->
<!--				 -->
<!--				<Node name="Ciliary_">-->
<!--					<OglModel name="Ciliary"  fileMesh="data/mesh/ciliary_processes.obj" texturename="data/textures/ciliary.bmp" castshadow="0"/>-->
<!--				</Node>-->
<!--				-->
<!--				<Node name="Cornea_">-->
<!--					<OglShader vertFilename="shaders/generalRenderingShader.vert" fragFilename="shaders/generalRenderingShader.frag" />-->
<!--					<OglShaderDefineMacro id="PLANE_ENVIRONMENT_MAPPING" />-->
<!--					<OglFloatVariable id="altitude" value="0.0000001"/>-->
<!--					<OglTexture textureFilename="textures/lights4-small-noise.bmp" textureUnit="2" id="planeTexture"/>-->
<!--					<OglModel name="Cornea"  fileMesh="data/mesh/cornea.obj" premultipliedAlpha="true"-->
<!--						material="texture Ambient 1 0.2 0.2 0.2 1.0 Diffuse 1 1.0 1.0 1.0 0.8 Specular 1 1.0 1.0 1.0 1.0 Emissive 0 0.15 0.05 0.05 0.0 Shininess 1 500"/>-->
<!--						/>-->
<!--				</Node>-->
<!--			</Node>-->
<!--		</Node>-->
<!---->
<!--	</Node>-->

<!--        <Node name="CompleteEyeAnatomicalModel">-->
<!--		<OglModel name="Muscle1"      fileMesh="data/mesh/inf_recus_muscle.obj" texturename="data/textures/muscle.bmp" castshadow="0" />-->
<!--		<OglModel name="Muscle2"      fileMesh="data/mesh/lat_recus_muscle.obj" texturename="data/textures/muscle.bmp" castshadow="0" />-->
<!--		<OglModel name="Muscle3"      fileMesh="data/mesh/med_recus_muscle.obj" texturename="data/textures/muscle.bmp" castshadow="0" />-->
<!--		<OglModel name="Muscle4"      fileMesh="data/mesh/super_recus_muscle.obj" texturename="data/textures/muscle.bmp" castshadow="0" />-->
<!--		<OglModel name="Muscle5"      fileMesh="data/mesh/infer_obl_muscle.obj" texturename="data/textures/muscle.bmp" castshadow="0" />-->
<!--		<OglModel name="Muscle6"      fileMesh="data/mesh/super_obl_muscle.obj" texturename="data/textures/muscle.bmp" castshadow="0" />-->
<!--	</Node>-->

<!--	<Node name="Injector">		-->
<!--		<OglShader vertFilename="shaders/generalRenderingShader.vert" fragFilename="shaders/generalRenderingShader.frag" />-->
<!--		<OglShaderDefineMacro id="PHONG" />-->
<!--	-->
<!--		<OglModel name="Inject"       fileMesh="data/mesh/injector_visual_fake.obj"-->
<!--			material="texture Ambient 1 0.0 0.0 0.0 1.0 Diffuse 1 0.2 0.2 0.2 1.0 Specular 1 1.0 1.0 1.0 1.0 Emissive 0 0.15 0.05 0.05 0.0 Shininess 1 10"-->
<!--		/>-->
<!--	</Node>-->
<!---->
<!--	<Node name="Clamps">		-->
<!--		<OglShader vertFilename="shaders/generalRenderingShader.vert" fragFilename="shaders/generalRenderingShader.frag" />-->
<!--		<OglShaderDefineMacro id="PHONG" />-->
<!--	-->
<!--		<OglModel name="Clamps"       fileMesh="data/mesh/clamps.obj" -->
<!--			material="texture Ambient 1 0.0 0.0 0.0 1.0 Diffuse 1 0.2 0.2 0.2 1.0 Specular 1 1.0 1.0 1.0 1.0 Emissive 0 0.15 0.05 0.05 0.0 Shininess 1 10"-->
<!--		/>-->
<!--	</Node>-->
<!---->
<!--	<Node name="CompleteEyeAnatomicalModel_Skin">-->
<!--		<OglShader vertFilename="shaders/generalRenderingShader.vert" fragFilename="shaders/generalRenderingShader.frag" />-->
<!--		<OglShaderDefineMacro id="PHONG" />-->
<!--		<OglShaderDefineMacro id="BUMP_MAPPING" />-->
<!--		<OglShaderDefineMacro id="TEXTURE_UNIT_0" />-->
<!--		-->
<!--		<OglFloatVariable id="bumpFactor" value="1.0" />-->
<!--		<OglFloatVariable id="showDebug" value="1.0" />-->
<!--		<OglTexture name="color" id="colorTexture" textureFilename="data/textures/face_color.jpg" textureUnit="1" repeat="true"/>-->
<!--		<OglTexture name="bump" id="normalMap" textureFilename="data/textures/face_normalMap.jpg" textureUnit="2" repeat="true"/>-->
<!--		<OglModel name="Skin" fileMesh="data/mesh/face.obj"  putOnlyTexCoords="true" /> -->
<!--	</Node>-->


        <Node name="Capsule">
            <Node name="Collision">
                <TriangleSetTopologyContainer name="capsule_topo" filename="data/mesh/capsule.obj" />
                <MechanicalObject name="capsule" template="Vec3d"/>
                <Triangle group="3" moving="0" simulated="0"/>
                <Line group="3" moving="0" simulated="0"/>
                <Point group="3" moving="0" simulated="0"/>
                <Node name="Visual">
                    <OglModel name="Capsule_visual"  color="0 0 1 0.3" />
                    <IdentityMapping object1="capsule" object2="Capsule_visual" />
                </Node>
            </Node>
        </Node>


</Node>
