<Node name="root" dt="0.02" showBehaviorModels="1" showCollisionModels="0" showMappings="0" showForceFields="0" showBoundingTree="0" showVisualModels="1" gravity="0 0 0">
    <MasterContactSolver name="MasterSolver" maxIt="5000" tolerance="0.00000001"  displayTime="true"  printLog="0"/>
    <CollisionPipeline verbose="0" />
    <BruteForceDetection name="N2" />
    <CollisionResponse response="FrictionContact" />

    <LocalMinDistance name="Proximity" alarmDistance="0.0002" contactDistance="0.00005" bothSides="true" coneFactor="0.3" angleCone="0.001"/>

    <Node name="Rest_position">
        <MeshLoader name="rest_shape" filename="../mesh/lens_implant_refinedHaptics.obj"/>
        <Mesh/>
        <Vertex2Frame name="RestVertex2Frame" template="Rigid" vertices="@rest_shape.vertices" normals="@rest_shape.normals" />
<!--        <MechanicalObject name="rest_triangles" template="Rigid" position="@RestVertex2Frame.frames"/>-->
<!--        <OglModel name="Visual" color="green"/>-->
    </Node>

    <Node name="Square">
        <EulerImplicitSolver rayleighMass="1.0" rayleighStiffness="1.5"/>
<!--        <CGLinearSolver iterations="100" tolerance="1e-15" threshold="1e-15"/>-->
<!--        <CGLinearSolver template="FullMatrix" iterations="100" tolerance="1e-15" threshold="1e-15"/>-->
<!--        <PCGLinearSolver name="PCG linear solver" iterations="25" tolerance="1e-15" threshold="1e-15" printLog="false" />-->
<!--        <JacobiPreconditioner/>-->
<!--        <SparseTAUCSSolver name="Solver" symmetric="true" options="taucs.factor.indefinite=true taucs.factor.ordering=metis" printLog="false" />-->
        <SparseLDLSolver name="SparseLDL Solver" printLog="false" />
        <TriangleSetTopologyContainer name="baseTriangles" filename="../mesh/lens_implant_refinedHaptics.obj"/>
<!--        <MechanicalObject name="tri" template="Rigid" debugViewIndices="false" debugViewIndicesScale="0.00005" rest_position="@../Rest_position/RestVertex2Frame.frames" position="@../Rest_position/RestVertex2Frame.frames"/>-->
        <MechanicalObject name="tri" template="Rigid" debugViewIndices="false" debugViewIndicesScale="0.0003" rest_position="@../Rest_position/RestVertex2Frame.frames" position="
        0.000512879 0.000661019 -0.000554555 0.118404 0.44223 0.462375 -0.759357 0.000517124 0.000837666 -0.000729412 0.297966 -0.380627 -0.852897 0.197248 0.00031659 0.00062241 -0.000753894 0.314308 -0.371918 -0.857829 0.164368 -2.9254e-06 -0.000413218 -0.000161942 -0.155645 0.417155 -0.740267 0.503747 0.000392939 0.000891249 -0.000934388 -0.212511 0.422343 0.807316 -0.353138 -2.75571e-05 -0.000613389 -0.000311622 -0.0638024 -0.473256 0.507626 -0.717129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"/>

        <UniformMass mass="0.1 0.1 [ 0.1 0 0 ,  0 0.1 0 ,  0 0 0.05 ]" showAxisSizeFactor="0.0003" totalmass="0.0001" />

        <!-- State writing -->
<!--        <WriteState filename="FoldedSquare.state" writeX="1" period="1.2"/>-->

        <!-- Set of vertices -->
        <BoxROI name="centralLine" box="-0.002 -0.0003 -0.0001 0.0025 0.0004 0.0001" drawSize="0"/>
        <FixedConstraint indices="@centralLine.indices" drawSize="0"/>
<!--        <BoxROI name="body" box="-0.002 -0.003 -0.0001 0.0025 0.003 0.0001" drawSize="0"/>-->
<!--        <FixedConstraint indices="@body.indices" drawSize="0"/>-->


        <!-- Haptic control -->
            <!-- Folds the haptic onto the body -->
<!--        <ConstantForceField points="3 5 6 61 128 130 131 182-184" forces="-1500000 -1000000 0 0 0 0"/>-->
<!--        <ConstantForceField points="0 1 2 4 8 127 129 137-139" forces="1500000 1000000 0 0 0 0"/>-->
            <!-- Pushes the haptics into the folded body -->
<!--        <ConstantForceField points="3 5 6 61 128 130 131 182-184" forces="0 -3000 5000 0 0 0"/>-->
<!--        <ConstantForceField points="190 460" forces="0 -50000 0 0 0 0"/>-->
<!--        -->
<!--        <ConstantForceField points="0 1 2 4 8 127 129 137-139" forces="0 2000 3500 0 0 0"/>-->
<!--        <ConstantForceField points="400 404" forces="0 50000 0 0 0 0"/>-->

        <!-- Body control -->
<!--        <ConstantForceField points="0-472" forces="0 0 -0.01 0 0 0"/>-->
<!--        <ConstantForceField points="@body.indices" forces="0 0 -50000 0 0 0"/>-->
<!--        <ConstantForceField points="210 91 93-97 99 215 216 100-104 222 107 224 227" forces="0 100000 100000 0 0 0"/>-->
<!--        <ConstantForceField points="41-45 165 163 47 48 167 50 170 51 52 54 173 174 55 176 56" forces="0 -100000 100000 0 0 0"/>-->

        <TriangularBendingFEMForceField name="FEM" bending="true" youngModulus="1.092e6" poissonRatio="0.42" thickness="0.15"/>

        <LinearSolverConstraintCorrection  />

        <Node>
            <MechanicalObject name="basePointsVec3" template="Vec3d"/>
            <IdentityMapping/>

<!--            <StiffSpringForceField name="Springs" stiffness="5e7" spring="4 248 5e7 1 0.0001   129 270 5e7 1 0.0001   10 221 5e7 1 0.0001   12 104 5e7 1 0.0001   118 251 5e7 1 0.0001   106 116 5e7 1 0.0001   3 269 5e7 1 0.0001   130 240 5e7 1 0.0001    70 173 5e7 1 0.0001   71 243 5e7 1 0.0001   64 244 5e7 1 0.0001   65 241 5e7 1 0.0001"/>-->

            <Node name="VisualBasePoints">
                <OglModel name="Visual" color="green"/>
                <IdentityMapping object1="basePointsVec3" object2="Visual"/>
            </Node>
        </Node>

        <Node>
              <MechanicalObject name="basePointsVec3" template="Vec3d"/>
              <IdentityMapping/>
              <Triangle selfCollision="1"/>
              <Line selfCollision="0"/>
              <Point selfCollision="1"/>
        </Node>

<!--        <Node name="SubTriangles">-->
<!--            <TriangleSetTopologyContainer  name="subTriangles"/>-->
<!--            <TriangleSubdivisionTopologicalMapping object1="baseTriangles" object2="subTriangles" subdivisions="1"/>-->
<!--            <MechanicalObject  name="subPoints" debugViewIndices="false" debugViewIndicesScale="0.0003"/>-->
<!--            <BendingPlateMechanicalMapping/>-->
<!--<!--            <Triangle />-->-->
<!--            <Node>-->
<!--                <OglModel name="Visual" color="red"/>-->
<!--                <IdentityMapping object1="subPoints" object2="Visual"/>-->
<!--            </Node>-->
<!--        </Node>-->

    </Node>
</Node>
