<Node name="root" dt="0.02" showBehaviorModels="1" showCollisionModels="0" showMappings="0" showForceFields="0" showBoundingTree="0" showVisualModels="1" gravity="0 0 0">
    <CollisionPipeline verbose="0" />
    <BruteForceDetection name="N2" />
    <CollisionResponse response="default" />
    <MinProximityIntersection name="Proximity" alarmDistance="0.8" contactDistance="0.5" />
    <CollisionGroup />

    <Node name="Rest_position">
        <MeshLoader name="rest_shape" filename="../mesh/square9x9.obj"/>
        <Mesh/>
        <Vertex2Frame name="RestVertex2Frame" template="Rigid" vertices="@rest_shape.vertices" normals="@rest_shape.normals" />
<!--        <MechanicalObject name="rest_triangles" template="Rigid" position="@RestVertex2Frame.frames"/>-->
<!--        <OglModel name="Visual" color="green"/>-->
    </Node>

    <Node name="Square">
        <EulerImplicitSolver rayleighMass="1.0" rayleighStiffness="1.5"/>
<!--        <CGLinearSolver iterations="100" tolerance="1e-15" threshold="1e-15"/>-->
<!--        <CGLinearSolver template="FullMatrix" iterations="100" tolerance="1e-15" threshold="1e-15"/>-->
        <SparseLDLSolver name="SparseLDL Solver" printLog="false" />
        <TriangleSetTopologyContainer name="baseTriangles" filename="../mesh/square9x9.obj"/>
<!--        <MechanicalObject name="tri" template="Rigid" debugViewIndices="false" debugViewIndicesScale="0.0003" rest_position="@../Rest_position/RestVertex2Frame.frames" position="@../Rest_position/RestVertex2Frame.frames"/>-->
        <MechanicalObject name="tri" template="Rigid" debugViewIndices="false" debugViewIndicesScale="0.0003" rest_position="@../Rest_position/RestVertex2Frame.frames" position="
        -0.00499368 -0.00231072 0.00410652 -0.458821 -0.429949 -0.563631 0.535675 -0.00374561 -0.00237749 0.0040869 -0.44762 -0.428561 -0.573962 0.535294 -0.00249746 -0.00244259 0.00406768 -0.433212 -0.429481 -0.575123 0.545075 -0.001248 -0.00247792 0.00405584 -0.434519 -0.417794 -0.575041 0.553145 1.04568e-06 -0.00252427 0.00404081 -0.415749 -0.416742 -0.577236 0.56593 0.00125074 -0.00249772 0.00404856 -0.411651 -0.428124 -0.558968 0.578626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"/>


        <UniformMass mass="0.1 0.1 [ 0.1 0 0 ,  0 0.1 0 ,  0 0 0.05 ]" showAxisSizeFactor="0.001" totalmass="0.0001" />

<!--        <WriteState filename="FoldedSquare.state" writeX="1" period="30"/>-->

        <BoxROI name="box1" box="-0.0051 -0.0001 -0.0001 0.0051 0.0001 0.0001" drawSize="0"/>
        <FixedConstraint indices="@box1.indices" drawSize="0"/>

<!--        <FixedRotationConstraint FixedZRotation="true"/>-->
<!--        <ConstantForceField points="0-80" forces="0 0 0.000015 0 0 0"/>-->
        <TriangularBendingFEMForceField name="FEM" bending="true" youngModulus="1.092e6" poissonRatio="0.42" thickness="0.0001"/>

        <Node>
            <MechanicalObject name="basePointsVec3" template="Vec3d"/>
            <IdentityMapping/>
            <Node name="VisualBasePoints">
                <OglModel name="Visual" color="green"/>
                <IdentityMapping object1="basePointsVec3" object2="Visual"/>
            </Node>
        </Node>

<!--        <Node name="SubTriangles">-->
<!--            <TriangleSetTopologyContainer  name="subTriangles"/>-->
<!--            <TriangleSubdivisionTopologicalMapping object1="baseTriangles" object2="subTriangles" subdivisions="0"/>-->
<!--            <MechanicalObject  name="subPoints" debugViewIndices="false" debugViewIndicesScale="0.0003"/>-->
<!--            <BendingPlateMechanicalMapping/>-->
<!--            <Triangle />-->
<!--            <Node>-->
<!--                <OglModel name="Visual" color="red"/>-->
<!--                <IdentityMapping object1="subPoints" object2="Visual"/>-->
<!--            </Node>-->
<!--        </Node>-->

    </Node>
</Node>
