<Node name="root" dt="0.02" showBehaviorModels="1" showCollisionModels="0" showMappings="0" showForceFields="0" showBoundingTree="0" showVisualModels="1" gravity="0 0 0">
    <CollisionPipeline verbose="0" />
    <BruteForceDetection name="N2" />
    <CollisionResponse response="default" />
    <MinProximityIntersection name="Proximity" alarmDistance="0.8" contactDistance="0.5" />
    <CollisionGroup />

    <Node name="Rest_position">
        <MeshLoader name="rest_shape" filename="../mesh/square9x9.obj"/>
        <Mesh/>
        <Vertex2Frame name="RestVertex2Frame" template="Rigid" vertices="@rest_shape.vertices" normals="@rest_shape.normals" />
    </Node>

    <Node name="Square">
        <EulerImplicitSolver rayleighMass="1.0" rayleighStiffness="1.5"/>
<!--        <CGLinearSolver iterations="100" tolerance="1e-15" threshold="1e-15"/>-->
<!--        <CGLinearSolver template="FullMatrix" iterations="100" tolerance="1e-15" threshold="1e-15"/>-->
        <SparseLDLSolver name="SparseLDL Solver" printLog="false" />
        <TriangleSetTopologyContainer name="baseTriangles" filename="../mesh/square9x9.obj"/>
        <MechanicalObject name="tri" template="Rigid" debugViewIndices="false" debugViewIndicesScale="0.0003"
        rest_position="-0.00499998 -0.00498885 0.000465388 -0.0147941 -0.0122796 -0.70679 0.70715 -0.00374998 -0.00498884 0.000464731 -0.0186012 -0.0192114 -0.70649 0.707193 -0.0025 -0.00498852 0.000473075 -0.0180124 -0.0176697 -0.706559 0.707182 -0.00125 -0.00498858 0.000470836 -0.0206827 -0.0200647 -0.70639 0.707207 -2.33898e-09 -0.00498837 0.000476438 -0.0186386 -0.0176866 -0.706538 0.707185 0.00125 -0.00498848 0.000473021 -0.020968 -0.0198935 -0.706386 0.707208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"
        position="-0.00499752 -0.00220882 0.00421663 -0.461726 -0.398146 -0.553333 0.567549 -0.00374903 -0.00226801 0.00420062 -0.453787 -0.406111 -0.556844 0.564869 -0.00249989 -0.00231313 0.00418848 -0.440724 -0.407201 -0.554528 0.576583 -0.0012501 -0.00233516 0.00418188 -0.438918 -0.403043 -0.55538 0.580052 -2.32545e-07 -0.00235325 0.00417674 -0.429501 -0.403918 -0.554402 0.587382 0.0012497 -0.00233994 0.00418059 -0.428717 -0.410984 -0.547993 0.589065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"/>
        <UniformMass mass="0.1 0.1 [ 0.1 0 0 ,  0 0.1 0 ,  0 0 0.05 ]" showAxisSizeFactor="0.001" totalmass="0.0001" />

        <BoxROI name="centralLine" box="-0.0051 -0.0001 -0.0001 0.0051 0.0001 0.0001" drawSize="0"/>
        <FixedConstraint indices="@centralLine.indices" drawSize="0"/>

        <TriangularBendingFEMForceField name="FEM" bending="true" youngModulus="1.092e6" poissonRatio="0.42" thickness="0.0001"/>
        <FixedRotationConstraint FixedZRotation="true"/>

        <Node>
            <MechanicalObject name="basePointsVec3" template="Vec3d"/>
            <IdentityMapping/>
            <Node name="VisualBasePoints">
                <OglModel name="Visual" color="green"/>
                <IdentityMapping object1="basePointsVec3" object2="Visual"/>
            </Node>
        </Node>

    </Node>


<!--    <Node name="Tube">-->
<!--        <TriangleSetTopologyContainer name="tubeTriangles" filename="../mesh/tube.obj"/>-->
<!--        <MechanicalObject name="tube" template="Vec3d"/>-->
<!--        <OglModel name="Visual" color="blue"/>-->
<!--    </Node>-->


</Node>
