<?xml version="1.0"?>
<Node gravity="0 0 0">
    <VisualStyle displayFlags="showVisual" />

    <!-- Collision stuff -->
    <CollisionPipeline name="pipeline" depth="6" verbose="0" />
    <BruteForceDetection name="detection" />
    <CollisionResponse name="response" response="default" />
    <MinProximityIntersection name="proximity" alarmDistance="0.05" contactDistance="0.05" />


    <Node name="splitMesh">
        <VisualStyle displayFlags="showWireframe" />
        <MeshObjLoader name="loader" filename="splitMeshB.obj" />
        <Vertex2Frame name="frames" template="Rigid" position="@loader.position" normals="@loader.normals" />
        <TriangleSetTopologyContainer name="topology" src="@loader" />
        <MechanicalObject template="Rigid" position="@frames.frames" />
        <OglModel name="visual" color="0.75 0 0" />
        <IdentityMapping input="@." output="@visual" />
    </Node>

    <Node name="joinedMesh">
        <JoinMeshPoints template="Rigid" name="join" src="@/splitMesh/loader" joinPoints="
            2 608
            224 162
            13 604
            227 151
            12 647
            184 152
            11 644
            188 153
            1 640
            192 154
            10 636
            196 155
            0 632
            199 156
            6 628
            204 150
            5 624
            208 166
            4 620
            212 165
            14 616
            216 164
            3 612
            220 163
            " />
        <Vertex2Frame name="framesS" template="Rigid" position="@join.mergedPosition" normals="@join.mergedNormals" />
        <Vertex2Frame name="framesJ" template="Rigid" position="@join.joinedPosition" normals="@join.joinedNormals" />
    </Node>

    <Node name="simulation">
        <MeshInterpolator template="Rigid" name="interp"
            startPosition="@/joinedMesh/framesS.frames"
            endPosition="@/splitMesh/frames.frames"
            nbSteps="1"
            increment="0.1" />
        <EulerImplicit />
        <CGLinearSolver iterations="50" tolerance="1e-7" threshold="1e-7" />

        <TriangleSetTopologyContainer name="topology" position="@/joinedMesh/join.joinedPosition" triangles="@/joinedMesh/join.joinedTriangles" />
        <MechanicalObject name="state" template="Rigid" position="@/joinedMesh/framesJ.frames" />
        <UniformMass showAxisSizeFactor="0.1" totalMass="1" />

        <Node>
            <!--<VisualStyle displayFlags="showBehavior" />-->

            <!-- use PlaneROI to discover the proper indices -->
            <PlaneROI name="Side1" drawSize="0" plane="
                -5.12 -1.24 -3.90
                -3.72 2.26 -3.20
                -3.52 5.36 -0.80
                0.2" />
            <FixedConstraint indices="@Side1.indices" />
            <PlaneROI name="Side2" drawSize="0" plane="
                -6.12 1.70 1.84
                -4.52 -1.90 2.34
                -3.02 -5.10 0.64
                0.2" />
            <FixedConstraint indices="@Side2.indices" />

            <TriangularBendingFEMForceField
                bending="true"
                poissonRatio="0.5"
                thickness="0.2"
                youngModulus="10000"

                restShape="@../interp"
                topologyMapper="@/joinedMesh/join"
                />

            <!-- We need mechanical mapping for collision, because it work with
                 Vec3 and not with Rigid -->
            <Node name="SubTriangles">
                <!--<VisualStyle displayFlags="hideVisual" />-->
                <!-- we can just use same points/topology -->
                <TriangleSetTopologyContainer  name="subTrianglesTopo"
                    position="@../../state.position" triangles="@../../topology.triangles" />
                <MechanicalObject name="subPoints" />
                <BendingPlateMechanicalMapping input="@../../state" output="@subPoints"/>

                <Point contactStiffness="1e2"/>
                <Line contactStiffness="1e2"/>
                <Triangle contactStiffness="1e2"/>

            </Node>

        </Node>
        <OglModel name="visual" color="1 0.5 0.5" />
        <IdentityMapping input="@." output="@visual" />
    </Node>

    <Node name="obstruction">
        <MeshObjLoader name="loader" filename="obstructionMesh.obj" />
        <TriangleSetTopologyContainer src="@loader" />
        <MechanicalObject template="Vec3d" />
        <Node>
            <OglModel name="visual" color="0.5 0.5 1" />
            <IdentityMapping input="@.." output="@visual" />
        </Node>

        <Point moving="0" simulated="0" />
        <Line moving="0" simulated="0" />
        <Triangle moving="0" simulated="0" />

    </Node>

</Node>
