<?xml version="1.0"?>
<Node gravity="0 0 0" dt="0.05">

    <!-- Collision stuff -->
    <CollisionPipeline name="pipeline" depth="6" verbose="0" />
    <BruteForceDetection name="detection" />
    <CollisionResponse name="response" response="default" />
    <MinProximityIntersection name="proximity" alarmDistance="0.05" contactDistance="0.05" />


    <Node name="heart">
        <MeshObjLoader name="loader" filename="heart.obj" />
        <TriangleSetTopologyContainer src="@loader" />
        <MechanicalObject template="Vec3d" position="@loader.position" />
        <Node>
            <OglModel name="visual" color="0.8 0.4 0.4" />
            <IdentityMapping input="@.." output="@visual" />
        </Node>
    </Node>
    <Node name="pulmonaryArtery">
        <VisualStyle displayFlags="hideVisual" />
        <MeshObjLoader name="loader" filename="pulmonary-artery.obj" />
        <TriangleSetTopologyContainer src="@loader" />
        <MechanicalObject template="Rigid" position="@loader.position" />
        <Node>
            <OglModel name="visual" color="0 0 1" />
            <IdentityMapping input="@.." output="@visual" />
        </Node>
    </Node>
    <Node name="aorticArch">
        <MeshObjLoader name="loader" filename="aortic-arch-split.obj" />
        <TriangleSetTopologyContainer src="@loader" />
        <MechanicalObject template="Rigid" position="@loader.position" />
        <!--<OglModel name="visual" color="1 0 0" />
        <IdentityMapping input="@." output="@visual" />-->
    </Node>
    <Node name="result">
        <JoinMeshPoints template="Rigid" name="join" src="@/aorticArch/loader" joinPoints="
            322 662
            321 663
            320 664
            328 656
            327 657
            326 658
            325 659
            324 660
            323 661
            329 648
            330 647
            331 646
            332 645
            333 644
            334 643
            335 642
            " />
    </Node>
    <Node name="simulation">
        <EulerImplicit />
        <CGLinearSolver iterations="100" tolerance="1e-9" threshold="1e-9" />

        <Node>

            <MeshInterpolator template="Rigid" name="interpolator"
                startPosition="@/result/join.mergedPosition"
                endPosition="@/aorticArch/loader.position"
                startNormals="@/result/join.mergedNormals"
                endNormals="@/aorticArch/loader.normals"
                nbSteps="5"
                increment="0.1" />
            <TriangleSetTopologyContainer name="topology" position="@/result/join.joinedPosition" triangles="@/result/join.joinedTriangles" />
            <MechanicalObject name="state" template="Rigid" rest_position="@/result/join.joinedPosition" />
            <UniformMass showAxisSizeFactor="0.1" totalMass="1" />
            <FixedConstraint indices="0-15 377-385 361-367" />
            <BezierTriangularBendingFEMForceField
                poissonRatio="0.5"
                thickness="0.2"
                youngModulus="10000"
                restShape="@./interpolator"
                topologyMapper="@/result/join" />
            <!--
            <Node>
                <OglModel name="visual" color="1 0 0" />
                <IdentityMapping input="@.." output="@visual" />
            </Node>
            -->
            <Node>
                <TriangleSetTopologyContainer  name="subTrianglesTopo"
                    position="@../state.position" triangles="@../topology.triangles" />
                <MechanicalObject name="subPoints" />
                <BezierTriangleMechanicalMapping input="@.." output="@."/>

                <Node>
                    <OglModel name="visual" color="1 0 0" />
                    <IdentityMapping input="@.." output="@visual" />
                </Node>

                <Point />
                <Line />
                <Triangle />

            </Node>
        </Node>

        <Node>
            <TriangleSetTopologyContainer name="topology" src="@/pulmonaryArtery/loader" />
            <MechanicalObject name="state" template="Rigid" rest_position="@/pulmonaryArtery/loader.position" />
            <UniformMass showAxisSizeFactor="0.1" totalMass="1" />
            <FixedConstraint indices="396 397 403 401 400 411 410 408 407 433 428 429 431 421 420 423 425 417 414 415" />
            <BezierTriangularBendingFEMForceField
                normals="@/pulmonaryArtery/loader.normals"
                poissonRatio="0.5"
                thickness="0.2"
                youngModulus="10000"/>
            <!--
            <Node>
                <OglModel name="visual" color="1 1 1" />
                <IdentityMapping input="@.." output="@visual" />
            </Node>
            -->
            <Node>
                <TriangleSetTopologyContainer  name="subTrianglesTopo"
                    position="@../state.position" triangles="@../topology.triangles" />
                <MechanicalObject name="subPoints" />
                <BezierTriangleMechanicalMapping input="@.." output="@."/>

                <Node>
                    <OglModel name="visual" color="0 0 1" />
                    <IdentityMapping input="@.." output="@visual" />
                </Node>

                <Point moving="0" simulated="0" />
                <Line moving="0" simulated="0" />
                <Triangle moving="0" simulated="0" />

            </Node>
        </Node>
    </Node>
</Node>
