<?xml version="1.0"?>

<!--
     Simulation of aspiration test (Nava/Hollenstein)

     Tube:      radius 1 cm
     Pressure:  300 mbar = 30 kPa
                ... this seems too much, we simulate 2 kPa with comparable results
     Liver:     3 cm x 3 cm  x 3 cm cube

     I'm not able to reliably set the collisions up when the tube model is
     adjacent to the cube (only by using very small dt). To overcome this the
     tube collision model is slightly above the cube.

-->

<Node name="root" dt="0.01" gravity="0 0 0">


    <Node name="plugins">
        <RequiredPlugin name="MultiThreading"/> <!-- Needed to use components [ParallelBVHNarrowPhase,ParallelBruteForceBroadPhase] -->
        <RequiredPlugin name="Sofa.Component.AnimationLoop"/> <!-- Needed to use components [FreeMotionAnimationLoop] -->
  		<RequiredPlugin name="Sofa.Component.Collision.Detection.Algorithm"/> <!-- Needed to use components [BVHNarrowPhase,BruteForceBroadPhase,BruteForceDetection,CollisionPipeline] -->
  		<RequiredPlugin name="Sofa.Component.Collision.Detection.Intersection"/> <!-- Needed to use components [LocalMinDistance] -->
  		<RequiredPlugin name="Sofa.Component.Constraint.Lagrangian.Correction"/> <!-- Needed to use components [LinearSolverConstraintCorrection] -->
  		<RequiredPlugin name="Sofa.Component.Constraint.Lagrangian.Solver"/> <!-- Needed to use components [GenericConstraintSolver] -->
  		<RequiredPlugin name="Sofa.Component.Constraint.Projective"/> <!-- Needed to use components [FixedProjectiveConstraint] -->
  		<RequiredPlugin name="Sofa.Component.Engine.Select"/> <!-- Needed to use components [BoxROI,SphereROI] -->
  		<RequiredPlugin name="Sofa.Component.IO.Mesh"/> <!-- Needed to use components [MeshSTLLoader,MeshVTKLoader,VTKExporter] -->
  		<RequiredPlugin name="Sofa.Component.LinearSolver.Direct"/> <!-- Needed to use components [SparseLDLSolver template="CompressedRowSparseMatrixMat3x3d"] -->
  		<RequiredPlugin name="Sofa.Component.Mapping.Linear"/> <!-- Needed to use components [BarycentricMapping,IdentityMapping] -->
  		<RequiredPlugin name="Sofa.Component.Mass"/> <!-- Needed to use components [UniformMass] -->
  		<RequiredPlugin name="Sofa.Component.MechanicalLoad"/> <!-- Needed to use components [SurfacePressureForceField] -->
  		<RequiredPlugin name="Sofa.Component.SceneUtility"/> <!-- Needed to use components [InfoComponent] -->
  		<RequiredPlugin name="Sofa.Component.SolidMechanics.FEM.Elastic"/> <!-- Needed to use components [TetrahedronFEMForceField] -->
		<RequiredPlugin name="Sofa.Component.StateContainer"/> <!-- Needed to use components [MechanicalObject] -->
		<RequiredPlugin name="Sofa.Component.Topology.Container.Dynamic"/> <!-- Needed to use components [TetrahedronSetTopologyContainer,TriangleSetTopologyContainer,TriangleSetTopologyModifier] -->
		<RequiredPlugin name="Sofa.Component.Topology.Mapping"/> <!-- Needed to use components [Tetra2TriangleTopologicalMapping] -->
		<RequiredPlugin name="Sofa.Component.Visual"/> <!-- Needed to use components [VisualStyle] -->
  		<RequiredPlugin name="Sofa.GL.Component.Rendering3D"/> <!-- Needed to use components [OglModel] -->
		<RequiredPlugin name='Sofa.Component.Collision.Response.Contact'/>
		<RequiredPlugin name="Sofa.Component.Collision.Geometry"/> <!-- Needed to use components [LineCollisionModel] -->
		<RequiredPlugin name="Sofa.Component.ODESolver.Backward"/> <!-- Needed to use components [EulerImplicitSolver] -->
		<RequiredPlugin name="Sofa.Component.Topology.Container.Constant"/> <!-- Needed to use components [MeshTopology] -->
        <RequiredPlugin name="Shell"/>
    </Node>


	<VisualStyle displayFlags="showVisual hideForceFields hideCollisionModels" />

    <FreeMotionAnimationLoop />
	<LCPConstraintSolver maxIt="1000" tolerance="1e-8" printLog="false"/>
	<CollisionPipeline depth="6" verbose="0" draw="0"/>
	<ParallelBruteForceBroadPhase name="N2"/>
	<ParallelBVHNarrowPhase/>
    <LocalMinDistance name="Proximity"  alarmDistance="0.01" contactDistance="0.0005"  angleCone="0.0" />
	<CollisionResponse name="Response" response="FrictionContactConstraint" />

        <Node name="VolMesh">
            <!--<MeshVTKLoader name="loader"  filename="../cube2739.vtk"-->
            <MeshVTKLoader name="loader"  filename="cube2648G.vtk"
                 scale3d="0.015 0.015 0.015" translation="-0.0075 0 -0.0075" />
            <TetrahedronSetTopologyContainer name="topo" triangles="@loader.triangles" position="@loader.position"  />
            <MechanicalObject name="VolMO" />
            <Node name="Surface">
                <TriangleSetTopologyContainer name="triangles" />
                <TriangleSetTopologyModifier />
                <Tetra2TriangleTopologicalMapping input="@../topo" output="@." />
            </Node>

        </Node>

        <Node name="SurfMesh">
            <!--<MeshOBJLoader name="loader" filename="../cube2739.obj"-->
            <MeshOBJLoader name="loader" filename="cube2648G.obj"
                scale3d="0.015 0.015 0.015" translation="-0.0075 0 -0.0075" />
            <TriangleSetTopologyContainer name="topo" src="@loader" />
            <MechanicalObject name="SurfMO" />
        </Node>

        <Node name="TubeMesh">
            <MeshOBJLoader name="loader" filename="tube.obj"
                scale3d="0.01 0.01 0.01" translation="0 0.0206 0" />
            <TriangleSetTopologyContainer name="topo" src="@loader" />
            <MechanicalObject name="TubeMO" />
        </Node>

        <Node name="Tube">
            <EulerImplicitSolver />
            <SparseLDLSolver template="CompressedRowSparseMatrixMat3x3d"/>

            <TriangleSetTopologyContainer name="topo" src="@/TubeMesh/topo" />

            <MechanicalObject template="Vec3d" />

            <FixedProjectiveConstraint indices="0-63" />

            <LinearSolverConstraintCorrection />

            <UniformMass totalMass="1"/>

            <Node name="Collision">
                <TriangleSetTopologyContainer name="topo" src="@../topo" />
                <TriangleSetTopologyModifier />

                <MechanicalObject template="Vec3d" />
                <IdentityMapping input="@.." output="@."/>

                <!--<Point name="tube_collis_point" group="10" />-->
                <LineCollisionModel name="tube_collis_line" group="10"/>
                <!--<Triangle name="tube_collis_line" bothSide="true" group="10"/>-->
            </Node>

	</Node>

        <Node name="Cube">
                <EulerImplicitSolver />
                <SparseLDLSolver template="CompressedRowSparseMatrixMat3x3d"/>


                <MeshTopology src="@/VolMesh/loader" />
                <MechanicalObject name="MO" src="@/VolMesh/loader"/>
                <BoxROI name="top" box="-0.0076 0.0149 -0.0076  0.0076 0.0178 0.0076" drawBoxes="true" />
                <BoxROI name="bottom" box="-0.0076 -0.0001 -0.0076  0.0076 0.0001 0.0076" drawBoxes="true" />

                <UniformMass totalMass="0.001"/>

                <VTKExporter filename="result_aspiration.vtk" XMLformat="false" listening="true"
                    edges="0" triangles="0" quads="0" tetras="1"
                    exportAtEnd="true" />

                <Node name="Tetra">
                    <TetrahedronFEMForceField name="FEM"
                        youngModulus="3.5e3" poissonRatio="0.45"
                        computeGlobalMatrix="false" method="large"/>
                </Node>

                <Node name="Tri">
                    <TriangleSetTopologyContainer name="topoTri" triangles="@../top.trianglesInROI" />

                    <SphereROI name="sphere" centers="0 0.015 0" radii="0.005" drawSphere="true" />
                    <SurfacePressureForceField name="SP"
                        pressure="3000" mainDirection="0 1 0"
                        triangleIndices="@sphere.triangleIndices"
                        />
                </Node>

                <!--<FixedProjectiveConstraint indices="@bottom.indices" />-->

                <LinearSolverConstraintCorrection/>

                <Node name="CubeCollision">
                    <MeshTopology src="@/SurfMesh/topo" />
                    <MechanicalObject />
                    <!--<Point name="cube_collis_point" group="11" />-->
                    <LineCollisionModel name="cube_collis_line" group="11" />
                    <!--<Triangle name="cube_collis_triangle" computeNormals="false" bothSide="true" group="11" />-->
                    <BarycentricMapping input="@.." output="@." />

                    <Node name="Visual">
                        <OglModel color="0 1 0 0.5" alphaBlend="true" depthTest="false" />
                        <IdentityMapping input="@.." output="@." />
                    </Node>
                </Node>

        </Node>

        <Node name="Cube-composite">
                <EulerImplicitSolver />
                <SparseLDLSolver template="CompressedRowSparseMatrixMat3x3d"/>


                <MeshTopology src="@/VolMesh/loader" />
                <MechanicalObject name="MO" src="@/VolMesh/loader"/>
                <BoxROI name="top" box="-0.0076 0.0149 -0.0076  0.0076 0.0178 0.0076" drawBoxes="true" />
                <BoxROI name="bottom" box="-0.0076 -0.0001 -0.0076  0.0076 0.0001 0.0076" drawBoxes="true" />-->

                <UniformMass totalMass="0.001"/>

                <VTKExporter filename="result_aspiration2.vtk" XMLformat="false" listening="true"
                    edges="0" triangles="0" quads="0" tetras="1"
                    exportAtEnd="true" />

                <Node name="Tetra">
                    <TetrahedronFEMForceField name="FEM"
                        youngModulus="3.5e3" poissonRatio="0.45"
                        computeGlobalMatrix="false" method="large"/>
                </Node>

                <Node name="Tri">
                    <TriangleSetTopologyContainer name="topoTri" triangles="@../top.trianglesInROI" />
                    <CstFEMForceField name="FEM" youngModulus="8e6" poissonRatio="0.45" thickness="20e-6" corotated="true" />

                    <SphereROI name="sphere" centers="0 0.015 0" radii="0.005" drawSphere="true" />
                    <SurfacePressureForceField name="SP"
                        pressure="3000" mainDirection="0 1 0"
                        triangleIndices="@sphere.triangleIndices"
                        />
                </Node>

                <!--<FixedProjectiveConstraint indices="@bottom.indices" />-->

                <LinearSolverConstraintCorrection/>

                <Node name="CubeCollision">
                    <MeshTopology src="@/SurfMesh/topo" />
                    <MechanicalObject />
                    <!--<Point name="cube_collis_point" group="11" />-->
                    <LineCollisionModel name="cube_collis_line" group="11" />
                    <!--<Triangle name="cube_collis_triangle" computeNormals="false" bothSide="true" group="11" />-->
                    <BarycentricMapping input="@.." output="@." />

                    <Node name="Visual">
                        <OglModel color="0 0 1 0.5" alphaBlend="true" depthTest="false" />
                        <IdentityMapping input="@.." output="@." />
                    </Node>
                </Node>

        </Node>

        <!--<Node name="TubeRender">-->
            <!--<MeshOBJLoader name="loader" filename="tube.obj"-->
                <!--scale3d="0.01 0.01 0.01" translation="0 0.0205 0" />-->
            <!--<TriangleSetTopologyContainer name="topo" src="@loader" />-->
            <!--<MechanicalObject name="TubeMO" />-->
            <!--<Node name="Visual">-->
                <!--<OglModel color="0.5 0.5 0.5 0.5" alphaBlend="true" />-->
                <!--<IdentityMapping input="@.." output="@."/>-->
            <!--</Node>-->
        <!--</Node>-->


</Node>
