<?xml version="1.0"?>
<Node name="root" dt="0.01" gravity="0 -10 0" >

    <Node name="plugins">
        <RequiredPlugin name="Shell"/>
        <RequiredPlugin name="Sofa.Component.AnimationLoop"/> <!-- Needed to use components [FreeMotionAnimationLoop] -->
        <RequiredPlugin name="Sofa.Component.Constraint.Projective"/> <!-- Needed to use components [FixedProjectiveConstraint] -->
        <RequiredPlugin name="Sofa.Component.Engine.Select"/> <!-- Needed to use components [BoxROI] -->
        <RequiredPlugin name="Sofa.Component.IO.Mesh"/> <!-- Needed to use components [MeshOBJLoader] -->
        <RequiredPlugin name="Sofa.Component.LinearSolver.Direct"/> <!-- Needed to use components [SparseLDLSolver] -->
        <RequiredPlugin name="Sofa.Component.Mapping.Linear"/> <!-- Needed to use components [IdentityMapping] -->
        <RequiredPlugin name="Sofa.Component.Mass"/> <!-- Needed to use components [UniformMass] -->
        <RequiredPlugin name="Sofa.Component.ODESolver.Backward"/> <!-- Needed to use components [EulerImplicitSolver] -->
        <RequiredPlugin name="Sofa.Component.StateContainer"/> <!-- Needed to use components [MechanicalObject] -->
        <RequiredPlugin name="Sofa.Component.Topology.Container.Constant"/> <!-- Needed to use components [MeshTopology] -->
        <RequiredPlugin name="Sofa.Component.Visual"/> <!-- Needed to use components [VisualStyle] -->
        <RequiredPlugin name="Sofa.GL.Component.Rendering3D"/> <!-- Needed to use components [OglModel] -->
        <RequiredPlugin name="Sofa.GUI.Component"/> <!-- Needed to use components [AttachBodyButtonSetting] -->
        <RequiredPlugin name="Sofa.Component.Collision.Geometry"/> <!-- Needed to use components [TriangleCollisionModel] -->
        <RequiredPlugin name="Sofa.Component.LinearSolver.Iterative"/> <!-- Needed to use components [CGLinearSolver] -->
        <RequiredPlugin name="Sofa.Component.MechanicalLoad"/> <!-- Needed to use components [ConstantForceField] -->
        <RequiredPlugin name="Sofa.Component.SceneUtility"/> <!-- Needed to use components [InfoComponent] -->
        <RequiredPlugin name="Sofa.Component.Topology.Container.Dynamic"/> <!-- Needed to use components [TriangleSetTopologyContainer] -->
        <RequiredPlugin name="Sofa.Component.Collision.Detection.Algorithm"/> <!-- Needed to use components [BVHNarrowPhase,BruteForceBroadPhase,CollisionPipeline] -->
        <RequiredPlugin name="Sofa.Component.Collision.Detection.Intersection"/> <!-- Needed to use components [MinProximityIntersection] -->
        <RequiredPlugin name="Sofa.Component.Collision.Response.Contact"/> <!-- Needed to use components [CollisionResponse] -->
        <RequiredPlugin name="Sofa.Component.Engine.Transform"/> <!-- Needed to use components [Vertex2Frame] -->
        <RequiredPlugin name="Sofa.Component.SolidMechanics.FEM.Elastic"/> <!-- Needed to use components [BeamFEMForceField] -->
    </Node>

    <VisualStyle displayFlags="showBehaviorModels showCollisionModels"/>
    <DefaultAnimationLoop/>
<!--    <MasterContactSolver name="MasterSolver" maxIt="5000" tolerance="0.00000001"  displayTime="true"  printLog="0" mu="0.1"/>-->
    <CollisionPipeline verbose="0" />
    <BruteForceBroadPhase name="N2"/>
    <BVHNarrowPhase/>
    <CollisionResponse name="response" response="PenaltyContactForceField" />
    <MinProximityIntersection name="Proximity" alarmDistance="0.005" contactDistance="0.001"/>


    <Node name="pointA">
       <MechanicalObject template="Rigid3" name="fixedPoint" position="-0.03 0 0 0 0 0 1"/>
    </Node>


    <!-- Motion control of the dragon -->
    <Node name="Motion" activated="false">
        <EulerImplicitSolver name="EulerImplicit" />
        <CGLinearSolver name="CG Solver" />
        <MechanicalObject name="ArticulatedObject" template="Vec1d"/>
        <Node name="6D_DOFs1">

            <MechanicalObject name="6D_Dof" template="Rigid3"/>
            <UniformMass totalMass="1" showAxisSizeFactor="0.001"/>
            <ArticulatedSystemMapping input1="@../ArticulatedObject" output="@6D_Dof"/>
        </Node>
        <ArticulatedHierarchyContainer filename="BeamMotionInTube.bvh"/>
        <ArticulatedHierarchyBVHController />
    </Node>


    <Node name="Beam">
        <EulerImplicitSolver rayleighStiffness="0" printLog="false" />
<!--        <BTDLinearSolver template="NewMatBand" bandWidth="11"  printLog="false" verbose="false" />-->
        <SparseLDLSolver name="SparseLDL Solver" printLog="false" template="CompressedRowSparseMatrixd"/>
        <MechanicalObject template="Rigid3" name="DOFs" position="-0.03 0 0 0 0 0 1    -0.02 0 0 0 0 0 1    -0.01 0 0 0 0 0 1    0 0 0 0 0 0 1    0.01 0 0 0 0 0 1     0.02 0 0 0 0 0 1     0.03 0 0 0 0 0 1     0.04 0 0 0 0 0 1" />
        <MeshTopology name="lines" lines="0 1 1 2 2 3 3 4 4 5 5 6 6 7" />
        <!--<AttachProjectiveConstraint name="Constraint" object2="@DOFs" object1="@/pointA/fixedPoint" indices1="0" indices2="0" freeRotations="false" />-->
        <FixedProjectiveConstraint indices="0"/>
        <UniformMass vertexMass="0.5 0.1 [ 0.1 0 0 ,  0 0.1 0 ,  0 0 0.1 ]" showAxisSizeFactor="0.01" printLog="false" />
        <BeamFEMForceField name="FEM" radius="0.01" youngModulus="1e6" />

<!--        <RestShapeSpringsForceField points="7" stiffness="1e6" angularStiffness="1e6" external_rest_shape="../Motion/6D_DOFs1/6D_Dof" external_points="1"/>-->

<!--        <Node name="Collision">-->
<!--            <CubeTopology nx="2" ny="15" nz="2" min="0.001 -0.03 -0.001" max="-0.001 0.04 0.001" />-->
<!--            <MechanicalObject />-->
<!--            <BeamLinearMapping isMechanical="true" localCoord="false"/>-->
<!--            <TriangleCollisionModel />-->
<!--        </Node>-->
        <Node name="Collision">
            <CubeTopology nx="15" ny="2" nz="2" min="0 -0.1 -0.1" max="7 0.1 0.1" />
            <MechanicalObject />
            <BeamLinearMapping isMechanical="true" localCoord="true"/>
            <TriangleCollisionModel contactStiffness="1e4" bothSide="1"/>
            <LineCollisionModel contactStiffness="1e4" bothSide="1"/>
            <PointCollisionModel contactStiffness="1e4" bothSide="1"/>
        </Node>
    </Node>


    <Node name="Rest_colon">
        <MeshOBJLoader name="rest_shape" filename="../../../Shell/mesh/fake_colon.obj"/>
        <MeshTopology/>
        <Vertex2Frame name="RestVertex2Frame" template="Rigid3" invertNormals="false" position="@rest_shape.position" normals="@rest_shape.normals" />
    </Node>


    <Node name="Fake_colon" activated="true">
        <EulerImplicitSolver/>
        <CGLinearSolver iterations="100" tolerance="1e-15" threshold="1e-15"/>
        <MeshOBJLoader name="loader" filename="../../../Shell/mesh/fake_colon.obj" />
        <TriangleSetTopologyContainer name="trianglesTopo" src="@loader"/>
        <MechanicalObject name="colon" template="Rigid3" showIndices="false" showIndicesScale="0.0003" position="@../Rest_colon/RestVertex2Frame.frames" topology="@trianglesTopo"/>

        <UniformMass showAxisSizeFactor="0.003" totalMass="3" />

        <BoxROI name="box1" box="-0.065 -0.03 -0.03 -0.06 0.03 0.03" drawSize="0"/>
        <FixedProjectiveConstraint indices="@box1.indices" drawSize="0"/>
        <BoxROI name="box2" box="0.06 -0.03 -0.03 0.065 0.03 0.03" drawSize="0"/>
        <FixedProjectiveConstraint indices="@box2.indices" drawSize="0"/>

        <FixedRotationProjectiveConstraint FixedZRotation="true"/>
        <TriangularBendingFEMForceField name="FEM" bending="true" youngModulus="1e5" poissonRatio="0.42" thickness="0.001" />

        <Node name="SubTriangles">
            <TriangleSetTopologyContainer name="subTrianglesTopo"/>
            <!--<TriangleSubdivisionTopologicalMapping object1="trianglesTopo" object2="subTrianglesTopo" subdivisions="1"/>-->
            <MechanicalObject name="subPoints" topology="@subTrianglesTopo"/>
            <BendingPlateMechanicalMapping input="@../colon" output="@subPoints"/>
            <TriangleCollisionModel contactStiffness="1e4" bothSide="1"/>
            <LineCollisionModel contactStiffness="1e4" bothSide="1"/>
            <PointCollisionModel contactStiffness="1e4" bothSide="1"/>
            <Node name="visual">
                <OglModel name="Visual" color="red"/>
                <IdentityMapping input="@../subPoints" output="@Visual"/>
            </Node>
        </Node>

    </Node>

</Node>
